<?xml version="1.0"?>
<?xml-stylesheet type="text/xsl" href="http://jsbsim.sourceforge.net/JSBSim.xsl"?>
<fdm_config name="BR1-mk3" version="2.0" release="ALPHA"
   xmlns:xsi="http://www.w3.org/2001/XMLSchema-instance"
   xsi:noNamespaceSchemaLocation="http://jsbsim.sourceforge.net/JSBSim.xsd">

  <fileheader>
    <author> Aeromatic v 0.96 </author>
    <filecreationdate>2021-03-16</filecreationdate>
    <version>$Revision: 1.20 $</version>
    <description> Models a BR1-mk3. </description>
  </fileheader>

  <!--
  File:     BR1-mk3.xml
  Inputs:
    name:          BR1_mk3
    type:          two-engine transonic/supersonic fighter
    max weight:    24857 lb
    wing span:     63.79 ft
    length:        54.134 ft
    wing area:     452.084 sq-ft
    gear type:     tricycle
    castering:
    retractable?:  yes
    # engines:     2
    engine type:   turbine
    engine layout: wings
    yaw damper?    yes
  Outputs:
    wing loading:  54.98 lb/sq-ft
    payload:       4811.6 lbs
    CL-alpha:      3.6 per radian
    CL-0:          0.08
    CL-max:        1
    CD-0:          0.024
    K:             0.12

-->

  <metrics>
    <wingarea  unit="FT2">  452.08 </wingarea>
    <wingspan  unit="FT" >   63.79 </wingspan>
    <wing_incidence>          3.75 </wing_incidence>
    <chord     unit="FT" >    7.09 </chord>
    <htailarea unit="FT2">  118.53 </htailarea>
    <htailarm  unit="FT" >   25.89 </htailarm>
    <vtailarea unit="FT2">  115.67 </vtailarea>
    <vtailarm  unit="FT" >   18.95 </vtailarm>
    <location name="AERORP" unit="IN">
      <x> 338.97 </x>
      <y>   0.00 </y>
      <z>   0.00 </z>
    </location>
    <location name="EYEPOINT" unit="IN">
      <x> 129.92 </x>
      <y>   0.00 </y>
      <z>  38.00 </z>
    </location>
    <location name="VRP" unit="IN">
      <x>0</x>
      <y>0</y>
      <z>0</z>
    </location>
  </metrics>

  <mass_balance>
    <ixx unit="SLUG*FT2">  55372 </ixx>
    <iyy unit="SLUG*FT2">    78944 </iyy>
    <izz unit="SLUG*FT2">   121118 </izz>
    <emptywt unit="LBS" >     14900 </emptywt>
    <location name="CG" unit="IN">
      <x> 338.97 </x>
      <y>   0.00 </y>
      <z> -16.24 </z>
    </location>
    <pointmass name="Payload">
      <description> 4812 LBS + full (5145 LBS) fuel should bring model up to entered max weight</description>
      <weight unit="LBS">   2405.8 </weight>
      <location name="POINTMASS" unit="IN">
        <x> 338.97 </x>
        <y>   0.00 </y>
        <z> -16.24 </z>
      </location>
    </pointmass>
  </mass_balance>

  <ground_reactions>

    <contact type="BOGEY" name="NOSE">
      <location unit="IN">
        <x>  84.45 </x>
        <y>   0.00 </y>
        <z> -77.95 </z>
      </location>
      <static_friction>  0.80 </static_friction>
      <dynamic_friction> 0.50 </dynamic_friction>
      <rolling_friction> 0.02 </rolling_friction>
      <spring_coeff unit="LBS/FT">       7457.10 </spring_coeff>
      <damping_coeff unit="LBS/FT/SEC">  3728.55 </damping_coeff>
      <max_steer unit="DEG"> 5.00 </max_steer>
      <brake_group>NONE</brake_group>
      <retractable>1</retractable>
    </contact>

    <contact type="BOGEY" name="LEFT_MAIN">
      <location unit="IN">
        <x> 352.53 </x>
        <y> -68.89 </y>
        <z> -77.95 </z>
      </location>
      <static_friction>  0.80 </static_friction>
      <dynamic_friction> 0.50 </dynamic_friction>
      <rolling_friction> 0.02 </rolling_friction>
      <spring_coeff unit="LBS/FT">      24857.00 </spring_coeff>
      <damping_coeff unit="LBS/FT/SEC"> 12428.50 </damping_coeff>
      <max_steer unit="DEG">0</max_steer>
      <brake_group>LEFT</brake_group>
      <retractable>1</retractable>
    </contact>

    <contact type="BOGEY" name="RIGHT_MAIN">
      <location unit="IN">
        <x> 352.53 </x>
        <y>  68.89 </y>
        <z> -77.95 </z>
      </location>
      <static_friction>  0.80 </static_friction>
      <dynamic_friction> 0.50 </dynamic_friction>
      <rolling_friction> 0.02 </rolling_friction>
      <spring_coeff unit="LBS/FT">      24857.00 </spring_coeff>
      <damping_coeff unit="LBS/FT/SEC"> 12428.50 </damping_coeff>
      <max_steer unit="DEG">0</max_steer>
      <brake_group>RIGHT</brake_group>
      <retractable>1</retractable>
    </contact>

    <contact type="STRUCTURE" name="LEFT_WING">
      <location unit="IN">
        <x> 338.97 </x>
        <y> -31.89 </y>
        <z> -16.24 </z>
      </location>
      <static_friction>  1.00 </static_friction>
      <dynamic_friction> 1.00 </dynamic_friction>
      <spring_coeff unit="LBS/FT">      24857.00 </spring_coeff>
      <damping_coeff unit="LBS/FT/SEC"> 24857.00 </damping_coeff>
    </contact>

    <contact type="STRUCTURE" name="RIGHT_WING">
      <location unit="IN">
        <x> 338.97 </x>
        <y>  31.89 </y>
        <z> -16.24 </z>
      </location>
      <static_friction>  1.00 </static_friction>
      <dynamic_friction> 1.00 </dynamic_friction>
      <spring_coeff unit="LBS/FT">      24857.00 </spring_coeff>
      <damping_coeff unit="LBS/FT/SEC"> 24857.00 </damping_coeff>
    </contact>

  </ground_reactions>

  <flight_control>

	<function name="fcs/engine-roll-mix">
        <table>
            <independentVar>velocities/vt-fps</independentVar>
            <tableData>
                0   0.1
                100  0.1
                200 0
                300 0
            </tableData>
        </table>
    </function>

    <function name="fcs/engine-pitch-mix">
        <table>
            <independentVar>velocities/vt-fps</independentVar>
            <tableData>
                0   0.1
                100  0.1
                200 0
                300 0
            </tableData>
        </table>
    </function>

    <function name="fcs/aero-moment-mix">
        <table>
            <independentVar>velocities/vt-fps</independentVar>
            <tableData>
                0   0
                100  0
                200 1
                300 1
            </tableData>
        </table>
    </function>

    <function name="fcs/engine-yaw-mix">
        <table>
            <independentVar>velocities/vt-fps</independentVar>
            <tableData>
                0   0.1
                100  0.1
                200 0
                300 0
            </tableData>
        </table>
    </function>

    <function name="fcs/lift-fan-thrust-mix">
        <table>
            <independentVar>velocities/vt-fps</independentVar>
            <tableData>
                0   0.9
                100  0.9
                200 0.0
                300 0.0
            </tableData>
        </table>
    </function>

    <function name="fcs/engine-thrust-mix">
        <table>
            <independentVar>velocities/vt-fps</independentVar>
            <tableData>
                0   0.9
                100  0.9
                200 1.0
                300 1.0
            </tableData>
        </table>
    </function>

    <channel name="Gear">
      <pure_gain>
        <input>gear/gear-cmd-norm</input>
        <gain>1</gain>
        <output>gear/gear-pos-norm</output>
      </pure_gain>
    </channel>

    <channel name="Elevator">
      <pure_gain>
        <input>fcs/elevator-cmd-norm</input>
        <gain>-1</gain>
        <output>fcs/elevator-pos-rad</output>
      </pure_gain>
    </channel>

    <channel name="Left Aileron">
      <pure_gain>
        <input>fcs/aileron-cmd-norm</input>
        <gain>-1</gain>
        <output>fcs/left-aileron-pos-rad</output>
      </pure_gain>
    </channel>

    <channel name="Right Aileron">
      <pure_gain>
        <input>fcs/aileron-cmd-norm</input>
        <gain>1</gain>
        <output>fcs/right-aileron-pos-rad</output>
      </pure_gain>
    </channel>

    <channel name="Rudder">
      <pure_gain>
        <input>fcs/rudder-cmd-norm</input>
        <gain>1</gain>
        <output>fcs/rudder-pos-rad</output>
      </pure_gain>
    </channel>

<!-- Left Engine -->
    <channel name="Engine0">
      <pure_gain name="fcs/elevator_to_engine0">
        <input>fcs/elevator-cmd-norm</input>
        <gain>fcs/engine-pitch-mix</gain>
      </pure_gain>
      <pure_gain name="fcs/throttle_to_engine0">
        <input>fcs/throttle-cmd-norm</input>
        <gain>fcs/engine-thrust-mix</gain>
      </pure_gain>
      <summer>
        <input>fcs/elevator_to_engine0</input>
        <input>fcs/throttle_to_engine0</input>
        <output>fcs/throttle-pos-norm</output>
      </summer>
    </channel>

<!--     <channel name="Engine0_Yaw">
      <pure_gain name="fcs/rudder_to_engine0_yaw">
        <input>fcs/rudder-cmd-norm</input>
        <gain>0.1</gain>
        <output>propulsion/engine/yaw-angle-rad</output>
      </pure_gain>
    </channel> -->

    <channel name="Engine1">
      <pure_gain name="fcs/elevator_to_engine1">
        <input>fcs/elevator-cmd-norm</input>
        <gain>fcs/engine-pitch-mix</gain>
      </pure_gain>
      <pure_gain name="fcs/throttle_to_engine1">
        <input>fcs/throttle-cmd-norm</input>
        <gain>fcs/engine-thrust-mix</gain>
      </pure_gain>
      <summer>
        <input>fcs/elevator_to_engine1</input>
        <input>fcs/throttle_to_engine1</input>
        <output>fcs/throttle-pos-norm[1]</output>
      </summer>
    </channel>

	<!-- Lift Fan Engine -->
	<channel name="Engine2">
      <pure_gain name="fcs/elevator_to_engine2">
        <input>fcs/elevator-cmd-norm</input>
        <gain>-fcs/engine-pitch-mix</gain>
      </pure_gain>
      <pure_gain name="fcs/throttle_to_engine2">
        <input>fcs/throttle-cmd-norm</input>
        <gain>fcs/lift-fan-thrust-mix</gain>
      </pure_gain>
      <summer>
        <input>fcs/elevator_to_engine2</input>
        <input>fcs/throttle_to_engine2</input>
        <output>fcs/throttle-pos-norm[2]</output>
      </summer>
    </channel>

<!--
    <channel name="Engine2">
      <pure_gain name="fcs/aileron_to_engine2">
        <input>fcs/aileron-cmd-norm</input>
        <gain>0.1</gain>
      </pure_gain>
      <pure_gain name="fcs/throttle_to_engine2">
        <input>fcs/throttle-cmd-norm</input>
        <gain>0.9</gain>
      </pure_gain>
      <summer>
        <input>fcs/aileron_to_engine2</input>
        <input>fcs/throttle_to_engine2</input>
        <output>fcs/throttle-pos-norm[2]</output>
      </summer>
    </channel>

    <channel name="Engine3">
      <pure_gain name="fcs/aileron_to_engine3">
        <input>fcs/aileron-cmd-norm</input>
        <gain>-0.1</gain>
      </pure_gain>
      <pure_gain name="fcs/throttle_to_engine3">
        <input>fcs/throttle-cmd-norm</input>
        <gain>0.9</gain>
      </pure_gain>
      <summer>
        <input>fcs/aileron_to_engine3</input>
        <input>fcs/throttle_to_engine3</input>
        <output>fcs/throttle-pos-norm[3]</output>
      </summer>
    </channel>
-->
  </flight_control>
  <propulsion>

    <engine file="CF34-9BR">
      <location unit="IN">
        <x> 430 </x>
        <y> -98.4 </y>
        <z> -40.00 </z>
      </location>
      <orient unit="DEG">
        <pitch> 0.00 </pitch>
        <roll>  0.00 </roll>
        <yaw>   0.00 </yaw>
      </orient>
      <feed>0</feed>
      <thruster file="direct">
        <location unit="IN">
          <x> 430 </x>
          <y> -98.4 </y>
          <z> -40.00 </z>
        </location>
        <orient unit="DEG">
          <pitch> 0.00 </pitch>
          <roll>  0.00 </roll>
          <yaw>   0.00 </yaw>
        </orient>
      </thruster>
    </engine>

    <engine file="CF34-9BR">
      <location unit="IN">
        <x> 430 </x>
        <y> 98.4 </y>
        <z> -40.00 </z>
      </location>
      <orient unit="DEG">
        <pitch> 0.00 </pitch>
        <roll>  0.00 </roll>
        <yaw>   0.00 </yaw>
      </orient>
      <feed>0</feed>
      <thruster file="direct">
        <location unit="IN">
          <x> 430 </x>
          <y> 98.4 </y>
          <z> -40.00 </z>
        </location>
        <orient unit="DEG">
          <pitch> 0.00 </pitch>
          <roll>  0.00 </roll>
          <yaw>   0.00 </yaw>
        </orient>
      </thruster>
    </engine>

    <engine file="liftfan">
      <location unit="FT">
        <x> 4.92 </x>
        <y>  0 </y>
        <z>  0 </z>
      </location>
      <orient unit="DEG">
        <pitch> 90 </pitch>
        <roll>   0 </roll>
        <yaw>   0 </yaw>
      </orient>
      <feed>0</feed>
      <thruster file="direct">
        <location unit="FT">
          <x> 4.92 </x>
          <y>  0</y>
          <z>  0 </z>
        </location>
        <orient unit="DEG">
          <pitch> 90 </pitch>
          <roll>   0 </roll>
          <yaw>   0 </yaw>
        </orient>
      </thruster>
    </engine>

    <tank type="FUEL" number="0">
      <location unit="IN">
        <x> 338.97 </x>
        <y>   0.00 </y>
        <z> -16.24 </z>
      </location>
      <capacity unit="LBS"> 1715.13 </capacity>
      <contents unit="LBS"> 857.57 </contents>
    </tank>

    <tank type="FUEL" number="1">
      <location unit="IN">
        <x> 338.97 </x>
        <y>   0.00 </y>
        <z> -16.24 </z>
      </location>
      <capacity unit="LBS"> 1715.13 </capacity>
      <contents unit="LBS"> 857.57 </contents>
    </tank>

    <tank type="FUEL" number="2">
      <location unit="IN">
        <x> 338.97 </x>
        <y>   0.00 </y>
        <z> -16.24 </z>
      </location>
      <capacity unit="LBS"> 1715.13 </capacity>
      <contents unit="LBS"> 857.57 </contents>
    </tank>

  </propulsion>

  <!--

 <flight_control name="BR1-mk3">

  <channel name="Pitch">

   <summer name="Pitch Trim Sum">
      <input>fcs/elevator-cmd-norm</input>
      <input>fcs/pitch-trim-cmd-norm</input>
      <clipto>
        <min> -1 </min>
        <max>  1 </max>
      </clipto>
   </summer>

   <aerosurface_scale name="Elevator Control">
      <input>fcs/pitch-trim-sum</input>
      <range>
        <min> -0.35 </min>
        <max>  0.35 </max>
      </range>
      <output>fcs/elevator-pos-rad</output>
   </aerosurface_scale>

   <aerosurface_scale name="elevator normalization">
      <input>fcs/elevator-pos-rad</input>
      <domain>
        <min> -0.35 </min>
        <max>  0.35 </max>
      </domain>
      <range>
        <min> -1 </min>
        <max>  1 </max>
      </range>
      <output>fcs/elevator-pos-norm</output>
   </aerosurface_scale>

  </channel>

  <channel name="Roll">

   <summer name="Roll Trim Sum">
      <input>fcs/aileron-cmd-norm</input>
      <input>fcs/roll-trim-cmd-norm</input>
      <clipto>
        <min> -1 </min>
        <max>  1 </max>
      </clipto>
   </summer>

   <aerosurface_scale name="Left Aileron Control">
      <input>fcs/roll-trim-sum</input>
      <range>
        <min> -0.35 </min>
        <max>  0.35 </max>
      </range>
      <output>fcs/left-aileron-pos-rad</output>
   </aerosurface_scale>

   <aerosurface_scale name="Right Aileron Control">
      <input>fcs/roll-trim-sum</input>
      <range>
        <min> -0.35 </min>
        <max>  0.35 </max>
      </range>
      <output>fcs/right-aileron-pos-rad</output>
   </aerosurface_scale>

   <aerosurface_scale name="left aileron normalization">
      <input>fcs/left-aileron-pos-rad</input>
      <domain>
        <min> -0.35 </min>
        <max>  0.35 </max>
      </domain>
      <range>
        <min> -1 </min>
        <max>  1 </max>
      </range>
      <output>fcs/left-aileron-pos-norm</output>
   </aerosurface_scale>

   <aerosurface_scale name="right aileron normalization">
      <input>fcs/right-aileron-pos-rad</input>
      <domain>
        <min> -0.35 </min>
        <max>  0.35 </max>
      </domain>
      <range>
        <min> -1 </min>
        <max>  1 </max>
      </range>
      <output>fcs/right-aileron-pos-norm</output>
   </aerosurface_scale>

  </channel>

  <property value="1">fcs/yaw-damper-enable</property>
  <channel name="Yaw">

   <summer name="Rudder Command Sum">
      <input>fcs/rudder-cmd-norm</input>
      <input>fcs/yaw-trim-cmd-norm</input>
      <clipto>
        <min> -1 </min>
        <max>  1 </max>
      </clipto>
   </summer>

   <scheduled_gain name="Yaw Damper Rate">
      <input>velocities/r-aero-rad_sec</input>
      <table>
        <independentVar lookup="row">velocities/ve-kts</independentVar>
         <tableData>
            30     0.00
            60     2.00
         </tableData>
      </table>
      <gain>fcs/yaw-damper-enable</gain>
   </scheduled_gain>

   <summer name="Rudder Sum">
      <input>fcs/rudder-command-sum</input>
      <input>fcs/yaw-damper-rate</input>
      <clipto>
        <min> -1.1 </min>
        <max>  1.1 </max>
      </clipto>
   </summer>

   <aerosurface_scale name="Rudder Control">
      <input>fcs/rudder-sum</input>
      <domain>
        <min> -1.1 </min>
        <max>  1.1 </max>
      </domain>
      <range>
        <min> -0.35 </min>
        <max>  0.35 </max>
      </range>
      <output>fcs/rudder-pos-rad</output>
   </aerosurface_scale>

   <aerosurface_scale name="rudder normalization">
      <input>fcs/rudder-pos-rad</input>
      <domain>
        <min> -0.35 </min>
        <max>  0.35 </max>
      </domain>
      <range>
        <min> -1 </min>
        <max>  1 </max>
      </range>
      <output>fcs/rudder-pos-norm</output>
   </aerosurface_scale>

  </channel>

  <channel name="Flaps">
   <kinematic name="Flaps Control">
     <input>fcs/flap-cmd-norm</input>
     <traverse>
       <setting>
          <position>  0 </position>
          <time>      0 </time>
       </setting>
       <setting>
          <position> 15 </position>
          <time>      4 </time>
       </setting>
       <setting>
          <position> 30 </position>
          <time>      3 </time>
       </setting>
     </traverse>
     <output>fcs/flap-pos-deg</output>
   </kinematic>

   <aerosurface_scale name="flap normalization">
      <input>fcs/flap-pos-deg</input>
      <domain>
        <min>  0 </min>
        <max> 30 </max>
      </domain>
      <range>
        <min> 0 </min>
        <max> 1 </max>
      </range>
      <output>fcs/flap-pos-norm</output>
   </aerosurface_scale>

  </channel>

  <channel name="Landing Gear">
   <kinematic name="Gear Control">
     <input>gear/gear-cmd-norm</input>
     <traverse>
       <setting>
          <position> 0 </position>
          <time>     0 </time>
       </setting>
       <setting>
          <position> 1 </position>
          <time>     5 </time>
       </setting>
     </traverse>
     <output>gear/gear-pos-norm</output>
   </kinematic>

  </channel>

  <channel name="Speedbrake">
   <kinematic name="Speedbrake Control">
     <input>fcs/speedbrake-cmd-norm</input>
     <traverse>
       <setting>
          <position> 0 </position>
          <time>     0 </time>
       </setting>
       <setting>
          <position> 1 </position>
          <time>     1 </time>
       </setting>
     </traverse>
     <output>fcs/speedbrake-pos-norm</output>
   </kinematic>

  </channel>

 </flight_control>
-->
 <aerodynamics>

  <axis name="LIFT">

    <function name="aero/force/Lift_alpha">
      <description>Lift due to alpha</description>
      <product>
          <property>aero/qbar-psf</property>
          <property>metrics/Sw-sqft</property>
          <table>
            <independentVar lookup="row">aero/alpha-rad</independentVar>
            <tableData>
              -0.20 -0.640
               0.00  0.080
               0.26  1.000
               0.60  0.448
            </tableData>
          </table>
      </product>
    </function>

    <function name="aero/force/Lift_flap">
       <description>Delta Lift due to flaps</description>
       <product>
           <property>aero/qbar-psf</property>
           <property>metrics/Sw-sqft</property>
           <property>fcs/flap-pos-deg</property>
           <value> 0.01167 </value>
       </product>
    </function>

    <function name="aero/force/Lift_speedbrake">
       <description>Delta Lift due to speedbrake</description>
       <product>
           <property>aero/qbar-psf</property>
           <property>metrics/Sw-sqft</property>
           <property>fcs/speedbrake-pos-norm</property>
           <value>0</value>
       </product>
    </function>

    <function name="aero/force/Lift_elevator">
       <description>Lift due to Elevator Deflection</description>
       <product>
           <property>aero/qbar-psf</property>
           <property>metrics/Sw-sqft</property>
           <property>fcs/elevator-pos-rad</property>
           <value>0.2</value>
       </product>
    </function>


  </axis>

  <axis name="DRAG">

    <function name="aero/force/Drag_basic">
      <description>Drag at zero lift</description>
      <product>
        <property>aero/qbar-psf</property>
        <property>metrics/Sw-sqft</property>
        <table>
          <independentVar lookup="row">aero/alpha-rad</independentVar>
          <tableData>
            -1.57    1.500
            -0.26    0.031
            0.00    0.024
            0.26    0.031
            1.57    1.500
          </tableData>
        </table>
      </product>
    </function>

    <function name="aero/force/Drag_induced">
      <description>Induced drag</description>
      <product>
        <property>aero/qbar-psf</property>
        <property>metrics/Sw-sqft</property>
        <property>aero/cl-squared</property>
        <value>0.12</value>
      </product>
    </function>

    <function name="aero/force/Drag_mach">
      <description>Drag due to mach</description>
      <product>
        <property>aero/qbar-psf</property>
        <property>metrics/Sw-sqft</property>
        <table>
          <independentVar lookup="row">velocities/mach</independentVar>
          <tableData>
            0.00      0.000
            0.81      0.000
            1.10      0.023
            1.80      0.015
          </tableData>
        </table>
      </product>
    </function>

    <function name="aero/force/Drag_flap">
      <description>Drag due to flaps</description>
      <product>
        <property>aero/qbar-psf</property>
        <property>metrics/Sw-sqft</property>
        <property>fcs/flap-pos-deg</property>
        <value> 0.00250 </value>
      </product>
    </function>

    <function name="aero/force/Drag_gear">
      <description>Drag due to gear</description>
      <product>
        <property>aero/qbar-psf</property>
        <property>metrics/Sw-sqft</property>
        <property>gear/gear-pos-norm</property>
        <value>0.02</value>
      </product>
    </function>

    <function name="aero/force/Drag_speedbrake">
      <description>Drag due to speedbrakes</description>
      <product>
        <property>aero/qbar-psf</property>
        <property>metrics/Sw-sqft</property>
        <property>fcs/speedbrake-pos-norm</property>
        <value>0.024</value>
      </product>
    </function>

    <function name="aero/force/Drag_beta">
      <description>Drag due to sideslip</description>
      <product>
        <property>aero/qbar-psf</property>
        <property>metrics/Sw-sqft</property>
        <table>
          <independentVar lookup="row">aero/beta-rad</independentVar>
          <tableData>
            -1.57    1.230
            -0.26    0.050
            0.00    0.000
            0.26    0.050
            1.57    1.230
          </tableData>
        </table>
      </product>
    </function>

    <function name="aero/force/Drag_elevator">
      <description>Drag due to Elevator Deflection</description>
      <product>
        <property>aero/qbar-psf</property>
        <property>metrics/Sw-sqft</property>
        <abs>
          <property>fcs/elevator-pos-norm</property>
        </abs>
        <value>0.04</value>
      </product>
    </function>

  </axis>

  <axis name="SIDE">

    <function name="aero/force/Side_beta">
      <description>Side force due to beta</description>
      <product>
        <property>aero/qbar-psf</property>
        <property>metrics/Sw-sqft</property>
        <property>aero/beta-rad</property>
        <value>-1</value>
      </product>
    </function>

  </axis>

  <axis name="ROLL">

    <function name="aero/moment/Roll_beta">
      <description>Roll moment due to beta</description>
      <product>
        <property>aero/qbar-psf</property>
        <property>metrics/Sw-sqft</property>
        <property>metrics/bw-ft</property>
        <property>aero/beta-rad</property>
        <value>-0.1</value>
      </product>
    </function>

    <function name="aero/moment/Roll_damp">
      <description>Roll moment due to roll rate</description>
      <product>
        <property>aero/qbar-psf</property>
        <property>metrics/Sw-sqft</property>
        <property>metrics/bw-ft</property>
        <property>aero/bi2vel</property>
        <property>velocities/p-aero-rad_sec</property>
        <value>-0.4</value>
      </product>
    </function>

    <function name="aero/moment/Roll_yaw">
      <description>Roll moment due to yaw rate</description>
      <product>
        <property>aero/qbar-psf</property>
        <property>metrics/Sw-sqft</property>
        <property>metrics/bw-ft</property>
        <property>aero/bi2vel</property>
        <property>velocities/r-aero-rad_sec</property>
        <value>0.15</value>
      </product>
    </function>

    <function name="aero/moment/Roll_aileron">
      <description>Roll moment due to aileron</description>
      <product>
        <property>aero/qbar-psf</property>
        <property>metrics/Sw-sqft</property>
        <property>metrics/bw-ft</property>
        <property>fcs/left-aileron-pos-rad</property>
        <value>0.12</value>
      </product>
    </function>

    <function name="aero/moment/Roll_rudder">
      <description>Roll moment due to rudder</description>
      <product>
        <property>aero/qbar-psf</property>
        <property>metrics/Sw-sqft</property>
        <property>metrics/bw-ft</property>
        <property>fcs/rudder-pos-rad</property>
        <value>0.01</value>
      </product>
    </function>

  </axis>

  <axis name="PITCH">

    <function name="aero/moment/Pitch_alpha">
      <description>Pitch moment due to alpha</description>
      <product>
        <property>aero/qbar-psf</property>
        <property>metrics/Sw-sqft</property>
        <property>metrics/cbarw-ft</property>
        <property>aero/alpha-rad</property>
        <value>-0.3</value>
      </product>
    </function>

    <function name="aero/moment/Pitch_elevator">
      <description>Pitch moment due to elevator</description>
      <product>
        <property>aero/qbar-psf</property>
        <property>metrics/Sw-sqft</property>
        <property>metrics/cbarw-ft</property>
        <property>fcs/elevator-pos-rad</property>
        <table>
          <independentVar lookup="row">velocities/mach</independentVar>
          <tableData>
            0.0     -0.800
            2.0     -0.200
          </tableData>
        </table>
      </product>
    </function>

    <function name="aero/moment/Pitch_damp">
      <description>Pitch moment due to pitch rate</description>
      <product>
        <property>aero/qbar-psf</property>
        <property>metrics/Sw-sqft</property>
        <property>metrics/cbarw-ft</property>
        <property>aero/ci2vel</property>
        <property>velocities/q-aero-rad_sec</property>
        <value>-18</value>
      </product>
    </function>

    <function name="aero/moment/Pitch_alphadot">
      <description>Pitch moment due to alpha rate</description>
      <product>
        <property>aero/qbar-psf</property>
        <property>metrics/Sw-sqft</property>
        <property>metrics/cbarw-ft</property>
        <property>aero/ci2vel</property>
        <property>aero/alphadot-rad_sec</property>
        <value>-9</value>
      </product>
    </function>

  </axis>

  <axis name="YAW">

    <function name="aero/moment/Yaw_beta">
      <description>Yaw moment due to beta</description>
      <product>
        <property>aero/qbar-psf</property>
        <property>metrics/Sw-sqft</property>
        <property>metrics/bw-ft</property>
        <property>aero/beta-rad</property>
        <value>0.12</value>
      </product>
    </function>

    <function name="aero/moment/Yaw_damp">
      <description>Yaw moment due to yaw rate</description>
      <product>
        <property>aero/qbar-psf</property>
        <property>metrics/Sw-sqft</property>
        <property>metrics/bw-ft</property>
        <property>aero/bi2vel</property>
        <property>velocities/r-aero-rad_sec</property>
        <value>-0.15</value>
      </product>
    </function>

    <function name="aero/moment/Yaw_rudder">
      <description>Yaw moment due to rudder</description>
      <product>
        <property>aero/qbar-psf</property>
        <property>metrics/Sw-sqft</property>
        <property>metrics/bw-ft</property>
        <property>fcs/rudder-pos-rad</property>
        <value>-0.1</value>
      </product>
    </function>

    <function name="aero/moment/Yaw_aileron">
      <description>Adverse yaw</description>
      <product>
        <property>aero/qbar-psf</property>
        <property>metrics/Sw-sqft</property>
        <property>metrics/bw-ft</property>
        <property>fcs/left-aileron-pos-rad</property>
        <value>0</value>
      </product>
    </function>

  </axis>

  </aerodynamics>

  <external_reactions>
  </external_reactions>

</fdm_config>
